Wing 5deg dihedral + T-tail (z=1.8) + fin: tpt-aero validation geometry
0.0
0   0   0.0
12.0  1.2  10.0
0.3   0.0  0.0
0.0

SURFACE
Wing
3  1.0  20  1.0

SECTION
0.0  -5.0  0.4374  1.2  0.0  10  1.0

SECTION
0.0   0.0  0.0  1.2  0.0  10  1.0

SECTION
0.0   5.0  0.4374  1.2  0.0

SURFACE
HTail
3  1.0  10  1.0

SECTION
4.0  -2.0  1.8  0.6  0.0  5  1.0

SECTION
4.0   0.0  1.8  0.6  0.0  5  1.0

SECTION
4.0   2.0  1.8  0.6  0.0

SURFACE
Fin
3  1.0  6  1.0

SECTION
3.8  0.0  0.0  0.9  0.0  6  1.0

SECTION
3.8  0.0  1.5  0.5  0.0
